// COMSOL Multiphysics 5.5.0.359 model "2DAx.mph"
// Outline of the model tree

Common definitions
  mpf1: ParticipationFactors

Geometry
  geom1 "Geometry 1" (2D axisymmetric, length unit m)
    imp1: Import
      type = native
      filename = C:\Users\i7\Documents\GitHub\MusicalAcousticsHWs\HL1\bell_section.mphbin
      meshfilename = C:\Users\i7\Documents\GitHub\MusicalAcousticsHWs\HL1\bell_section.mphbin
    fin: Finalize "Form Union"

Materials
  mat1: Common "Cast iron" on all domains
    def "Basic"
      thermalexpansioncoefficient = 11e-6[1/K]
      density = 7000[kg/m^3]
      heatcapacity = 420[J/(kg*K)]
      thermalconductivity = 50[W/(m*K)]
    Enu "Young's modulus and Poisson's ratio"
      youngsmodulus = 140e9[Pa]
      poissonsratio = 0.25

Physics
  solid: SolidMechanics on all domains
    dependent variable u = {u, v, w}
    lemm1: LinearElasticModel "Linear Elastic Material 1" (default)
    axi1: AxialSymmetrySolid "Axial Symmetry 1" (default)
    free1: Free (default)
    init1: init "Initial Values 1" (default)

Mesh
  mesh1 "Mesh 1" (physics-controlled)
    size: MeshSizeDefault | hauto = 1

Studies
  std1 "Study 1"
    eig: Eigenfrequency | neigs = 16; shift = 90[Hz]

Solver configurations
  sol1 "Solution 1" (study std1)
    v1: Variables "Dependent Variables 1"
    e1: Eigenvalue "Eigenvalue Solver 1" | eigvfunscale = maximum; eigvfunscaleparam = 1.39e-06
      dDef: Direct

Datasets
  dset1: Solution | solution = sol1
  rev1: Revolve2D "Revolution 2D 1" | data = dset1; startangle = -90; revangle = 225

Evaluation groups
  std1EvgFrq: EvaluationGroup "Eigenfrequencies (Study 1)" | data = dset1
    gev1: EvalGlobal "Global Evaluation 1"
      expr = {freq*2*pi, imag(freq)/abs(freq), abs(freq)/imag(freq)/2}
      unit = {rad/s, 1, 1}
      descr = {Angular frequency, Damping ratio, Quality factor}
  std1mpf1: EvaluationGroup "Participation Factors (Study 1)" | data = dset1
    gev1: EvalGlobal "Global Evaluation 1"
      expr = {mpf1.pfLnormR, mpf1.pfLnormZ, mpf1.pfRnormZ, mpf1.mEffLR, mpf1.mEffLZ, mpf1.mEffRZ}
      unit = {1, 1, 1, kg, kg, kg*m^2}
      descr = {"Participation factor, normalized, R-translation", "Participation factor, normalized, Z-translation", "Participation factor, normalized, Z-rotation", "Effective modal mass, R-translation", "Effective modal mass, Z-translation", "Effective modal mass, Z-rotation"}

Plots
  pg1: PlotGroup2D "Mode Shape (solid)" | data = dset1
    surf1: Surface | expr = solid.disp
      def: Deform "Deformation" | expr = {u, w}; descr = Displacement field
  pg2: PlotGroup3D "Mode Shape, 3D (solid)" | data = rev1
    surf1: Surface | expr = solid.disp
      def: Deform "Deformation" | revcoordsys = cylindrical; expr = {u, 0, w}; descr = Displacement field