// COMSOL Multiphysics 5.5.0.359 model "HWL1_bell_empty.mph"
// Outline of the model tree

Functions
  gp1: GaussianPulse | location = 0.002; sigma = 0.0001

Common definitions
  mpf1: ParticipationFactors

Geometry
  geom1 "Geometry 1" (3D, length unit m)
    wp1: WorkPlane | unite = on
      imp1: Import
        type = native
        filename = C:\Users\Alessio\Desktop\Acoustics\CMLS\Homework3\MusicalAcousticsHWs\HL1\bell_section.mphbin
        meshfilename = C:\Users\Alessio\Desktop\Acoustics\CMLS\Homework3\MusicalAcousticsHWs\HL1\bell_section.mphbin
    rev1: Revolve | workplane = wp1; input = wp1; angtype = full; origfaces = off
    cyl1: Cylinder | pos = {0, 0.05, 0}; axis = {45, 0}; axistype = spherical; r = 0.01
    int1: Intersection | input = cyl1, rev1; keep = on
    del1: Delete "Delete Entities 1" | input = cyl1(1) domains 1
    cyl2: Cylinder | pos = {0, 0.5, 0}; axis = {45, 0}; axistype = spherical; r = 0.01
    int2: Intersection | input = cyl2, rev1; keep = on
    del2: Delete "Delete Entities 2" | input = cyl2(1) domains 1
    fin: Finalize "Form Union"

Materials
  mat1: Common "Cast iron" on all domains
    def "Basic"
      thermalexpansioncoefficient = 11e-6[1/K]
      density = 7000[kg/m^3]
      heatcapacity = 420[J/(kg*K)]
      thermalconductivity = 50[W/(m*K)]
    Enu "Young's modulus and Poisson's ratio"
      youngsmodulus = 140e9[Pa]
      poissonsratio = 0.25

Physics
  solid: SolidMechanics on all domains
    dependent variable u = {u, v, w}
    lemm1: LinearElasticModel "Linear Elastic Material 1" (default)
    free1: Free (default)
    init1: init "Initial Values 1" (default)
    bndl1: BoundaryLoad "harmonic force edge" on boundaries 24
      LoadType = TotalForce
      Ftot = {1/sqrt(2), 0, 1/sqrt(2)}
      FperArea = {0, 0.5, 0.5}
    bndl2: BoundaryLoad "gaussian impulse edge" on boundaries 24
      LoadType = TotalForce
      Ftot = {comp1.gp1(t[1/s])/sqrt(2), 0, comp1.gp1(t[1/s])/sqrt(2)}
      FperArea = {comp1.gp1(t[1/s])/sqrt(2), 0, comp1.gp1(t[1/s])/sqrt(2)}
    bndl3: BoundaryLoad "harmonic force edge (modal study)" on boundaries 24
      LoadType = TotalForce
      Ftot = {1/sqrt(2), 0, 1/sqrt(2)}
      harmonicPerturbation = 1
    bndl4: BoundaryLoad "harmonic force side" on boundaries 18
      LoadType = TotalForce
      Ftot = {1/sqrt(2), 0, 1/sqrt(2)}
      FperArea = {0, 0.5, 0.5}
    bndl5: BoundaryLoad "gaussian impulse side" on boundaries 18
      LoadType = TotalForce
      Ftot = {comp1.gp1(t[1/s]), 0, comp1.gp1(t[1/s])}
      FperArea = {comp1.gp1(t[1/s])/sqrt(2), 0, comp1.gp1(t[1/s])/sqrt(2)}
    bndl6: BoundaryLoad "harmonic force edge side (modal study)" on boundaries 18
      LoadType = TotalForce
      Ftot = {1/sqrt(2), 0, 1/sqrt(2)}
      harmonicPerturbation = 1

Mesh
  mesh1 "mesh" (physics-controlled)
    size: MeshSizeDefault | hauto = 4

Studies
  std1 "Time history"
    time: Transient "Time Dependent"
      tlist = range(0,0.001,0.5)
      disabledphysics = {solid/bndl1, solid/bndl3, solid/bndl2, solid/bndl4, solid/bndl6}
  std2 "Frequency response"
    freq: Frequency "Frequency Domain"
      plist = range(00.1,10,600)
      disabledphysics = {solid/bndl2, solid/bndl3, solid/bndl1, solid/bndl5, solid/bndl6}
  std3 "Frequeny response (modal)"
    eig: Eigenfrequency "Frequency domain modal"
      neigs = 30
      shift = 110[Hz]
      disabledphysics = {solid/bndl2, solid/bndl1, solid/bndl3, solid/bndl4, solid/bndl5}
    frmod: Frequencymodal "Frequency Domain, Modal"
      plist = range(1,20,600)
      disabledphysics = {solid/bndl2, solid/bndl1, solid/bndl3, solid/bndl4, solid/bndl5}
  std4 "Eigenfrequency"
    eig: Eigenfrequency | neigs = 20; shift = 1[Hz]; disabledphysics = {solid/bndl3, solid/bndl2, solid/bndl1}

Solver configurations
  sol1 "Solution 1" (study std2)
    v1: Variables "Dependent Variables 1"
    s1: Stationary "Stationary Solver 1"
      p1: Parametric | pname = freq; plistarr = range(00.1,10,600); punit = Hz; pcontinuationmode = no
      fc1: FullyCoupled | linsolver = d1
      d1: Direct "Suggested Direct Solver (solid)"
  sol2 "Solution 2" (study std1)
    v1: Variables "Dependent Variables 1"
      comp1_u: Field "Displacement field (comp1.u)" | scalemethod = manual; scaleval = 1e-2*2.64386081328
    t1: Time "Time-Dependent Solver 1" | tlist = range(0,0.001,0.5); timemethod = genalpha
      fc1: FullyCoupled | linsolver = d1
      d1: Direct "Suggested Direct Solver (solid)"
  sol3 "Solution 3" (study std3)
    v1: Variables "Dependent Variables 1"
    e1: Eigenvalue "Eigenvalue Solver 1" | eigvfunscale = maximum; eigvfunscaleparam = 2.64E-6
      dDef: Direct
    su1: StoreSolution "Solution Store 1"
    v2: Variables "Dependent Variables 2" | notsolmethod = sol
    mo1: Modal "Modal Solver 1" | plist = range(1,20,600)
      dDef: Direct
  sol5 "Solution 5" (study std4)
    v1: Variables "Dependent Variables 1"
    e1: Eigenvalue "Eigenvalue Solver 1" | eigvfunscale = maximum; eigvfunscaleparam = 2.64E-6
      dDef: Direct
  sol4 "Solution Store 1" (study std3)

Datasets
  dset1: Solution | solution = sol1
  dset2: Solution | solution = sol2
  dset3: Solution | solution = sol3
  dset4: Solution | solution = sol4
  dset5: Solution | solution = sol5

Evaluation groups
  std4EvgFrq: EvaluationGroup "Eigenfrequencies (Eigenfrequency)" | data = dset5
    gev1: EvalGlobal "Global Evaluation 1"
      expr = {freq*2*pi, imag(freq)/abs(freq), abs(freq)/imag(freq)/2}
      unit = {rad/s, 1, 1}
      descr = {Angular frequency, Damping ratio, Quality factor}
  std4mpf1: EvaluationGroup "Participation Factors (Eigenfrequency)" | data = dset5
    gev1: EvalGlobal "Global Evaluation 1"
      expr = {mpf1.pfLnormX, mpf1.pfLnormY, mpf1.pfLnormZ, mpf1.pfRnormX, mpf1.pfRnormY, mpf1.pfRnormZ, mpf1.mEffLX, mpf1.mEffLY, mpf1.mEffLZ, mpf1.mEffRX, mpf1.mEffRY, mpf1.mEffRZ}
      unit = {1, 1, 1, 1, 1, 1, kg, kg, kg, kg*m^2, kg*m^2, kg*m^2}
      descr = {"Participation factor, normalized, X-translation", "Participation factor, normalized, Y-translation", "Participation factor, normalized, Z-translation", "Participation factor, normalized, X-rotation", "Participation factor, normalized, Y-rotation", "Participation factor, normalized, Z-rotation", "Effective modal mass, X-translation", "Effective modal mass, Y-translation", "Effective modal mass, Z-translation", "Effective modal mass, X-rotation", "Effective modal mass, Y-rotation", "Effective modal mass, Z-rotation"}

Plots
  pg1: PlotGroup3D "Stress (solid)" (disabled) | data = dset1
    surf1: Surface | expr = solid.mises
      def: Deform "Deformation" | expr = {u, v, w}; descr = Displacement field
    vol1: Volume | expr = solid.disp
  pg2: PlotGroup3D "Boundary Loads (solid)" | data = dset1; typeintitle = off; descriptionintitle = off; unitintitle = off
    arws1: ArrowSurface "Boundary Load 1" | data = dset1; expr = {solid.bndl1.F_Ax, solid.bndl1.F_Ay, solid.bndl1.F_Az}
      col: Color "Color Expression" | expr = comp1.solid.bndl1.F_A_Mag
      def: Deform "Deformation" | expr = {u, v, w}; descr = Displacement field
    surf1: Surface "Gray Surfaces" (disabled) | expr = 1
      def: Deform "Deformation" | expr = {u, v, w}; descr = Displacement field
  pg3: PlotGroup3D "deformation freq study" | data = dset1
    vol1: Volume | expr = solid.disp
  pg5: PlotGroup3D "Boundary Loads (solid) 1"
    data = dset2
    typeintitle = off
    descriptionintitle = off
    unitintitle = off
    arws1: ArrowSurface "gaussian impulse" | expr = {solid.bndl2.F_Ax, solid.bndl2.F_Ay, solid.bndl2.F_Az}
      col: Color "Color Expression" | expr = comp1.solid.bndl2.F_A_Mag
      def: Deform "Deformation" | expr = {u, v, w}; descr = Displacement field
    surf1: Surface "Gray Surfaces" (disabled) | expr = 1
      def: Deform "Deformation" | expr = {u, v, w}; descr = Displacement field
  pg6: PlotGroup3D "deformation time history" | data = dset2
    vol1: Volume | expr = solid.disp
  pg8: PlotGroup3D "Boundary Loads (solid) 2"
    data = dset3
    typeintitle = off
    descriptionintitle = off
    unitintitle = off
    arws1: ArrowSurface "harmonic forse (modal study)" | expr = {solid.bndl3.F_Ax, solid.bndl3.F_Ay, solid.bndl3.F_Az}
      col: Color "Color Expression" | expr = comp1.solid.bndl3.F_A_Mag
      def: Deform "Deformation" | expr = {u, v, w}; descr = Displacement field
    surf1: Surface "Gray Surfaces" (disabled) | expr = 1
      def: Deform "Deformation" | expr = {u, v, w}; descr = Displacement field
  pg10: PlotGroup3D "Mode Shape (solid)" | data = dset5
    surf1: Surface | expr = solid.disp
      def: Deform "Deformation" | expr = {u, v, w}; descr = Displacement field
  pg9: PlotGroup3D "deformation freq study (modal)" | data = dset3
    vol1: Volume | expr = solid.disp