// COMSOL Multiphysics 5.5.0.359 model "marimba.mph"
// Outline of the model tree

Parameters
  a = 0.009[m]
  height = 0.025[m]
  length = 0.1[m]
  width = 0.025[m]
  E_L = 10.3[GPa]
  E_T = 0.064*E_L
  E_R = 0.107*E_L
  G_LT = 0.086*E_L
  G_LR = 0.066*E_L
  G_RT = 0.028*E_L

Common definitions
  mpf1: ParticipationFactors

Geometry
  geom1 "Geometry 1" (3D, length unit m)
    wp1: WorkPlane | unite = on
      pol1: Polygon
        type = open
        source = table
        table = {{length*0.25, 0}, {0, 0}, {0, height}, {0.1, height}, {0.1, 0}, {length*(0.75), 0}}
      pc1: ParametricCurve | pos = {0.025, 0}; parmax = 0.05; coord = {s, a*sin(s*2*pi/length)}
      uni1: Union | input = pc1, pol1
      csol1: ConvertToSolid | input = uni1
    ext1: Extrude | workplane = wp1; input = wp1; distance = width
    fin: Finalize "Form Union"

Materials
  mat1: Common "Material 1" on all domains
    def "Basic"
      density = 450
    Orthotropic
      Evector = {E_L, E_T, E_R}
      nuvector = {0.533, 0.314, 0.6}
      Gvector = {G_LT, G_LR, G_RT}
      eta_Evector = {0, 0, 0}
      eta_Gvector = {0, 0, 0}

Physics
  solid: SolidMechanics on all domains
    dependent variable u = {u, v, w}
    lemm1: LinearElasticModel "Linear Elastic Material 1" (default) | SolidModel = Orthotropic
    free1: Free (default)
    init1: init "Initial Values 1" (default)

Mesh
  mesh1 "Mesh 1" (physics-controlled)

Studies
  std1 "Study 1"
    param: Parametric "Parametric Sweep" | pname = a; plistarr = range(0.1[cm],0.1[cm],0.9[cm]); punit = m
    eig: Eigenfrequency | neigs = 12; shift = 1[Hz]